*Heading
** Job name: mode1_linear Model name: Model-1
** Generated by: Abaqus/CAE 6.14-2
*Preprint, echo=NO, model=NO, history=NO, contact=NO
**
** PARTS
**
*Part, name=Part-1
*End Part
**
**
** ASSEMBLY
**
*Assembly, name=Assembly
**
*Instance, name=Part-1-1, part=Part-1
*Node
      1,         400.,           0.,         660.
      2,           0.,           0.,         660.
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*Element, type=C3D8R
   1,   310,  3315,  6951,  3123,     1,    29,   755,   166
   2,  3315,  3316,  6952,  6951,    29,    30,   756,   755
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*Nset, nset=Set-1
     1,     2,     3,     4,     5,     6
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*Elset, elset=Set-1
     1,     2,     3,     4,     5,     6
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*Nset, nset=Set-2
    11,    12,    13,    14,    15,    16
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*Elset, elset=Set-2
  6081,  6082,  6083,  6084,  6085,  6086
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** Section: Si
*Solid Section, elset=Set-1, material=Si
,
** Section: p
*Solid Section, elset=Set-2, material=p
,
*End Instance
**
*Nset, nset=Set-1, instance=Part-1-1
    3,    4,    6,    7,   25,   26
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*Elset, elset=Set-1, instance=Part-1-1
  1217,  1218,  1219,  1220,  1221,  1222
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*Nset, nset=Set-2, instance=Part-1-1
    3,    4,    6,    7,   25,   26
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*Elset, elset=Set-2, instance=Part-1-1
  1217,  1218,  1219,  1220,  1221,  1222
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*Nset, nset=Set-3, instance=Part-1-1
   5,   8, 167, 168, 169, 170
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*Elset, elset=Set-3, instance=Part-1-1
 3763, 3764, 3765, 3766, 3767, 3768
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*End Assembly
**
** MATERIALS
**
*Material, name=Si
*Damping, alpha=90.
*Density
 2.33e-09,
*Elastic
 1.7e+11, 0.28
*Material, name=p
*Damping, alpha=90.
*Density
 1.43e-09,
*Elastic
 3e+09, 0.33
**
** BOUNDARY CONDITIONS
**
** Name: BC-1 Type: Symmetry/Antisymmetry/Encastre
*Boundary
Set-2, ENCASTRE
** ----------------------------------------------------------------
**
** STEP: Step-1
**
*Step, name=Step-1, nlgeom=YES
*Static, direct
0.1, 1.,
**
** BOUNDARY CONDITIONS
**
** Name: BC-2 Type: Displacement/Rotation
*Boundary
Set-3, 2, 2, 5.
**
** OUTPUT REQUESTS
**
*Restart, write, frequency=0
*Output, field, frequency=0
**
** HISTORY OUTPUT: H-Output-1
**
*Output, history, variable=PRESELECT
*End Step
** ----------------------------------------------------------------
**
** STEP: Step-2
**
*Step, name=Step-2, nlgeom=YES, inc=1000000
*Dynamic
0.1,0.1,1e-13
**
** BOUNDARY CONDITIONS
**
** Name: BC-1 Type: Symmetry/Antisymmetry/Encastre
*Boundary, op=NEW
Set-2, ENCASTRE
** Name: BC-2 Type: Displacement/Rotation
*Boundary, op=NEW
**
** OUTPUT REQUESTS
**
*Restart, write, frequency=0
**
** FIELD OUTPUT: Dynamic Output
**
*Output, field, number interval=40000
*Node Output
A, U, V
*Element Output, directions=YES
E, LE, MISES, NE, S
**
** HISTORY OUTPUT: H-Output-1
**
*Output, history, variable=PRESELECT, frequency=1
*End Step
